// COMSOL Multiphysics 5.4.0.388 model "Cilindrical_Multi_Switch.mph"
// Outline of the model tree

Selections
  sel1: Explicit "Ground 1" on boundaries adjacent to domains 2, 4, 6
  sel2: Explicit "Terminal" on boundaries adjacent to domains 3, 5
  sel3: Explicit "Vacuum" on boundaries adjacent to domains 1
  sel4: Explicit "Ground 1.1" on domains 2, 4, 6
  sel5: Explicit "Terminal 1" on domains 3, 5
  sel6: Explicit "Vacuum 1" on domains 1

Geometry
  geom1 "Geometry 1" (2D axisymmetric, length unit m)
    r1: Rectangle | pos = {0.001, -0.000325}; size = {0.006, 0.00065}
    r2: Rectangle | pos = {0.001, -0.000325+0.0002+0.00065}; size = {0.006, 0.00065}
    r3: Rectangle | pos = {0.001, -0.000325+0.0002*2+0.00065*2}; size = {0.006, 0.00065}
    r4: Rectangle | pos = {0.001, -0.000325-0.00065-0.0002}; size = {0.006, 0.00065}
    r5: Rectangle | pos = {0.001, -0.000325-0.00065*2-0.0002*2}; size = {0.006, 0.00065}
    r6: Rectangle | pos = {0, -0.05}; size = {0.01, 0.10}
    fin: Finalize "Form Union"

Materials
  mat1: Common "Air" on selection sel6
    def "Basic"
      thermalexpansioncoefficient = alpha_p(pA,T)
      molarmass = 0.02897
      bulkviscosity = muB(T)
      relpermeability = 1
      relpermittivity = 1
      dynamicviscosity = eta(T)
      ratioofspecificheat = 1.4
      electricconductivity = 0[S/m]
      heatcapacity = Cp(T)
      density = rho(pA,T)
      thermalconductivity = k(T)
      soundspeed = cs(T)
      eta: Piecewise | arg = T; pieces = {200.0, 1600.0, -8.38278E-7+8.35717342E-8*T^1-7.69429583E-11*T^2+4.6437266E-14*T^3-1.06585607E-17*T^4}; argunit = K; fununit = Pa*s
      Cp: Piecewise | arg = T; pieces = {200.0, 1600.0, 1047.63657-0.372589265*T^1+9.45304214E-4*T^2-6.02409443E-7*T^3+1.2858961E-10*T^4}; argunit = K; fununit = J/(kg*K)
      rho: Analytic | expr = pA*0.02897/R_const[K*mol/J]/T; args = {pA, T}; dermethod = manual; argders = {{pA, d(pA*0.02897/R_const/T,pA)}, {T, d(pA*0.02897/R_const/T,T)}}; argunit = Pa,K; fununit = kg/m^3
      k: Piecewise | arg = T; pieces = {200.0, 1600.0, -0.00227583562+1.15480022E-4*T^1-7.90252856E-8*T^2+4.11702505E-11*T^3-7.43864331E-15*T^4}; argunit = K; fununit = W/(m*K)
      cs: Analytic | expr = sqrt(1.4*R_const[K*mol/J]/0.02897*T); args = T; dermethod = manual; argunit = K; fununit = m/s
      an1: Analytic | funcname = alpha_p; expr = -1/rho(pA,T)*d(rho(pA,T),T); args = {pA, T}; argunit = Pa,K; fununit = 1/K
      an2: Analytic "Analytic 2a" | funcname = muB; expr = 0.6*eta(T); args = T; argunit = K; fununit = Pa*s
    RefractiveIndex
      n = 1
      ki = 0
    NonlinearModel
      BA = (def.gamma+1)/2
  mat2: Common "Copper" on selection sel5
    def "Basic"
      relpermeability = 1
      electricconductivity = 5.998e7[S/m]
      heatcapacity = 385[J/(kg*K)]
      relpermittivity = 1
      emissivity = 0.5
      density = 8940[kg/m^3]
      thermalconductivity = 400[W/(m*K)]
    Enu "Young's modulus and Poisson's ratio"
      youngsmodulus = 126e9[Pa]
      poissonsratio = 0.34
    linzRes "Linearized resistivity"
      rho0 = 1.667e-8[ohm*m]
      alpha = 3.862e-3[1/K]
      Tref = 293.15[K]
  mat3: Common "Copper 1" on selection sel4
    // same settings as mat2

Physics
  es: Electrostatics on all domains
    dependent variable V
    ccn1: ChargeConservation (default)
    axi1: AxialSymmetry (default)
    zc1: ZeroCharge (default)
    init1: init "Initial Values 1" (default)
    gnd1: Ground on selection sel1
    gnd2: Ground on boundaries 2, 3, 24
    pot1: ElectricPotential on selection sel2 | V0 = 500

Mesh
  mesh1 "Mesh 1" (physics-controlled)

Studies
  std1 "Study 1"
    stat: Stationary

Solver configurations
  sol1 "Solution 1" (study std1)
    v1: Variables "Dependent Variables 1"
    s1: Stationary "Stationary Solver 1"
      dDef: Direct
      fc1: FullyCoupled | linsolver = dDef

Datasets
  dset1: Solution | solution = sol1
  rev1: Revolve2D "Revolution 2D 1" | data = dset1
  cln1: CutLine2D | data = dset1; genpoints = {{5.1199E-5, -0.0499681}, {2.98567E-5, 0.0499661}}

Plots
  pg1: PlotGroup2D "Electric Potential (es)" | data = dset1
    surf1: Surface | expr = V
  pg2: PlotGroup3D "Electric Potential, Revolved Geometry (es)" | data = rev1
    slc1: Slice | expr = V; quickxnumber = 3
  pg3: PlotGroup1D "1D Plot Group 3" | data = dset1
    lngr1: LineGraph | data = cln1; expr = V